** written by FreeCAD inp file writer for CalculiX,Abaqus meshes
** highest dimension mesh elements only.

** Nodes
*Node, NSET=Nall
1, 0, 0, 0
2, 0, 0, 3
3, 30, 0, 0
4, 30, 0, 3
5, 30, 30, 0
6, 30, 30, 3
7, 0, 30, 0
8, 0, 30, 3
9, 0, 0, 1.5
10, 30, 0, 1.5
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

** Volume elements
*Element, TYPE=C3D10, ELSET=Evolumes
565, 94, 390, 727, 995, 1002, 1001, 835, 1004, 1003, 1005
566, 94, 79, 390, 995, 272, 459, 1002, 1004, 1006, 1003
567, 338, 675, 664, 998, 1008, 911, 1007, 1010, 1009, 1011
568, 338, 664, 327, 998, 1007, 1012, 573, 1010, 1011, 1013
569, 701, 364, 343, 997, 1015, 597, 1014, 1017, 1016, 1018
570, 704, 367, 327, 998, 1020, 574, 1019, 1022, 1021, 1013
571, 720, 680, 383, 997, 992, 1023, 1024, 1026, 1025, 1027
572, 343, 680, 701, 997, 1028, 934, 1014, 1018, 1025, 1017
573, 367, 704, 675, 998, 1020, 811, 1029, 1021, 1022, 1009
574, 686, 673, 349, 996, 871, 1030, 1031, 1033, 1032, 1034
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
** Define element set Eall
*ELSET, ELSET=Eall
Evolumes


***********************************************************
** Element sets for materials and FEM element type (solid, shell, beam, fluid)
*ELSET,ELSET=MaterialSolidSolid
Evolumes

***********************************************************
** constraints fixed node sets
** ConstraintFixed
*NSET,NSET=ConstraintFixed
1,
2,
3,
4,
7,
8,
9,
10,
11,
12,
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
** Physical constants for SI(mm) unit system with Kelvins
*PHYSICAL CONSTANTS, ABSOLUTE ZERO=0, STEFAN BOLTZMANN=5.670374419e-11

***********************************************************
** Materials
** see information about units at file end
** FreeCAD material name: Aluminum-6061-T6
** MaterialSolid
*MATERIAL, NAME=MaterialSolid
*ELASTIC
69000,0.33

***********************************************************
** Sections
*SOLID SECTION, ELSET=MaterialSolidSolid, MATERIAL=MaterialSolid

***********************************************************
** At least one step is needed to run an CalculiX analysis of FreeCAD
*STEP, INC=2000
*STATIC


***********************************************************
** Fixed Constraints
** ConstraintFixed
*BOUNDARY
ConstraintFixed,1
ConstraintFixed,2
ConstraintFixed,3


***********************************************************
** constraints force node loads
*CLOAD
** ConstraintForce
** node loads on shape: Pad:Face6
2,3,-0
4,3,-0
6,3,-0
8,3,-0
26,3,-0
27,3,-0
28,3,-0
29,3,-0
30,3,-0
31,3,-0
32,3,-0
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

***********************************************************
** Outputs --> frd file
*NODE FILE
U
*EL FILE
S, E
** outputs --> dat file
** reaction forces for Constraint fixed
*NODE PRINT, NSET=ConstraintFixed, TOTALS=ONLY
RF

*OUTPUT, FREQUENCY=1
***********************************************************
*END STEP

***********************************************************
** CalculiX Input file
**   written by    --> FreeCAD 1.0.2
**   written on    --> Mon Mar 23 18:41:51 2026
**   file name     --> fea_test_1.FCStd
**   analysis name --> Analysis
**
**
***********************************************************
**  About units:
**  See ccx manual, ccx does not know about any unit.
**  Golden rule: The user must make sure that the numbers they provide have consistent units.
**  The user is the FreeCAD calculix writer module ;-)
**
**  The unit system which is used at Guido Dhondt's company: mm, N, s, K
**  Since Length and Mass are connected by Force, if Length is mm the Mass is in t to get N
**  The following units are used to write to inp file:
**
**  Length: mm (this includes the mesh geometry)
**  Mass: t
**  TimeSpan: s
**  Temperature: K
**
**  This leads to:
**  Force: N
**  Pressure: N/mm^2 == MPa (Young's Modulus has unit Pressure)
**  Density: t/mm^3
**  Gravity: mm/s^2
**  Thermal conductivity: t*mm/K/s^3 == as W/m/K == kW/mm/K
**  Specific Heat: mm^2/s^2/K = J/kg/K == kJ/t/K
**
