*HEADING
USES SUBSTRUCTURE GENERATION FILE boltpipeflange_3d_cyclsym_gen.inp
***************************************************************************
***************************************************************************
**these are the original nodes (0 - 22.5)
*NODE, INPUT=boltpipeflange_3d_node.inp,NSET=NO22
**these are the reflected nodes (22.5 -  45)
*NCOPY,CHANGE NUMBER=30000, OLD SET = NO22, REFLECT = MIRROR
23.097,0., -9.56709, 76.2201,0.,-31.5714
23.097,73.,-9.56709
**
** THE ABOVE NODAL COORDS ARE REQUIRED ONLY FOR THE ELEMENTS OF THE BOLT
** AND THE GASKET.  MAY WANT TO REREAD ONLY THESE ELEMENT NODES?
**
** One single substructure 0-45 deg
**
*ELEMENT, TYPE=Z9994, ELSET=SUP45,FILE=substr45
2003,
25124,25125,25126,25127,25128,25129,25130,25131,25132,25133,
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*SUBSTRUCTURE PROPERTY, ELSET=SUP45, POSITION TOL=0.0001
**
*NSET, NSET=FR1_HUBo,UNSORTED
25000, 25001, 25002, 25003, 25004, 25005
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**
**nodes on the front face of the hub (22.5-45)
**
*NSET, NSET=FR3_HUBo,UNSORTED
55000, 55001, 55002, 55003, 55004, 55005
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*BOUNDARY
FR1_HUBo,3
** symmetry conditions on the 45 face
***EQUATION
** 2
** FR3_HUBo,3,1., FR3_HUBo,1,1.
*NODE
89999, 0.0, 0.0, 0.0
99999, 0.0, 1.0, 0.0
*MPC
CYCLSYM, FR1_HUBo, FR3_HUBo, 89999, 99999
********************************
** define elements in the gasket (0 - 22.5)
********************************
*ELEMENT, TYPE=C3D20R, ELSET=PID1
2217,   25814,   17400,   24001,   25816,   25819,   17426,   24010,
25821,   17399,   17406,   24000,   25815,   17425,   17432,   24009,
25820,   25817,   17417,   24006,   25818
2218,   17400,   17402,   24003,   24001,   17426,   17428,   24012,
24010,   17401,   17407,   24002,   17406,   17427,   17433,   24011,
17432,   17417,   17418,   24007,   24006
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**
**
**GASKET BOTTOM
**
*NSET,NSET=GASK_B1,GENERATE
24000,24138
25816,25856,10
25818,25848,10
25821,25851,10
25823,25853,10
27693,27709
*BOUNDARY
GASK_B1,2
**
**GASKET FRONT EXCEPT FOR NODES THAT ARE USED BY INTERFACE ELEMENTS
**
*NSET,NSET=GASK_F1,GENERATE
25815,25855,5
25816,25856,5
25818,25853,5
** POZOR POZOR - nodes on gasket at the interface are constrained
25814,25854,5
25817,25852,5
*BOUNDARY
GASK_F1,3
**
**  GASKET BACK including nodes used by interface elements.
**
*NSET,NSET=BAGA1,GENERATE
27667,27675
27693,27709
27676,27692
**
*SOLID SECTION, ELSET=PID1, MATERIAL=MID2
1.,
**
** gasket_material
**
*MATERIAL, NAME=MID2
**
*ELASTIC,TYPE=ISOTROPIC
68700.,         0.3
********************************
** define elements in the gasket (22.5 - 45)
********************************
*ELCOPY,ELEMENT SHIFT=30000,OLD SET=PID1,SHIFT NODES=30000,NEW SET=PID31,REFLECT
**
**  GASKET BOTTOM
**
*NSET,NSET=GASK_B3,GENERATE
54000,54138
55816,55856,10
55818,55848,10
55821,55851,10
55823,55853,10
57693,57709
*BOUNDARY
GASK_B3,2
**
**  GASKET FRONT EXCEPT FOR NODES THAT ARE USED BY INTERFACE ELEMENTS
**
*NSET,NSET=GASK_F3,GENERATE
55815,55855,5
55816,55856,5
55818,55853,5
** POZOR POZOR - nodes on gasket at the interface are constrained
55814,55854,5
55817,55852,5
*TRANSFORM, NSET=GASK_F3
1.,0.,-1.,0.,1.,0.
*BOUNDARY
GASK_F3,3
**
**  GASKET BACK including nodes used by interface elements.
**
*NSET,NSET=BAGA3,GENERATE
57667,57675
57693,57709
57676,57692
**
** Weld together back nodes of the gaskets (including interface nodes)
*EQUATION
2,
BAGA3,1,1., BAGA1,1,-1.
*EQUATION
2,
BAGA3,2,1., BAGA1,2,-1.
*EQUATION
2,
BAGA3,3,1., BAGA1,3,-1.
**
** gasket_properties
**
*SOLID SECTION, ELSET=PID31, MATERIAL=MID2
1.,
**
******************************
** define elements in the bolt (0 - 22.5)
******************************
*ELEMENT, TYPE=C3D20R, ELSET=PID2
10030,   17976,   17978,   17984,   17982,   18006,   18008,   18014,
18012,   17977,   17981,   17983,   17980,   18007,   18011,   18013,
18010,   17998,   17999,   18001,   18000
10031,   17978,   17915,   17913,   17984,   18008,   17924,   17922,
18014,   17979,   17914,   17985,   17981,   18009,   17923,   18015,
18011,   17999,   17918,   17917,   18001
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** bolt_properties
**
*SOLID SECTION, ELSET=PID2, MATERIAL=MID3
1.,
**
** bolt_material
**
*MATERIAL, NAME=MID3
**
*ELASTIC,TYPE=ISOTROPIC
206000.,         0.3
**
**BOLT BOTTOM
**
*NSET,NSET=BOL_B1,GENERATE
24139,24221
26129,26135
26138,26141
26144,26147
*BOUNDARY
BOL_B1,2
**
**BOLT FRONT EXCEPT FOR NODES THAT ARE USED BY INTERFACE ELEMENTS
**
*NSET,NSET=BOL_F1,GENERATE
25857,25862
25864,25869
25871,26183
26192,26227
*BOUNDARY
BOL_F1,3
**
******************************
** define elements in the bolt (22.5 - 45)
******************************
*ELCOPY,ELEMENT SHIFT=30000,OLD SET=PID2,SHIFT NODES=30000,NEW SET=PID32,REFLECT
*SOLID SECTION, ELSET=PID32, MATERIAL=MID3
1.,
**
**BOLT BOTTOM
**
*NSET,NSET=BOL_B3,GENERATE
54139,54221
56129,56135
56138,56141
56144,56147
*BOUNDARY
BOL_B3,2
**
**BOLT FRONT EXCEPT FOR NODES THAT ARE USED BY INTERFACE ELEMENTS (face 45)
**
*NSET,NSET=BOL_F3,GENERATE
55857,55862
55864,55869
55871,56183
56192,56227
*TRANSFORM, NSET=BOL_F3
1.,0.,-1.,0.,1.,0.
*BOUNDARY
BOL_F3,3
**
**define the contact nodes on bottom hub (0-22.5); same set as bo_hu;
**
*NSET, NSET=BO1_HR
25124,25125,25126,25127,25128,25129
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**
**define the contact nodes on bottom hub (22.5-45); same set as bo_hu;
**
*NSET, NSET=BO3_HR
32589 ,32578 ,32567 ,32556 ,32545 ,32534 
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**
**define the contact nodes with the bolt (0-22.5); the same set as hu_bo;
**
*NSET, NSET=HU1_BR
8881, 8882, 8884, 8886, 8887, 8889
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**
**define the contact nodes with the bolt (22.5-45); the same set as hu_bo;
**
*NSET, NSET=HU3_BR
38881, 38882, 38884, 38886, 38887, 38889
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***************************************
**  Contact Between Gasket and Hub  *** (0-22.5) )22.5-45
***************************************
*** (0-22.5)
*ELSET,ELSET=PID7,GENERATE
2217,2240
*ELSET,ELSET=PID8,GENERATE
2241,2264
*surface,NAME=GASKET22
PID7,S3
PID8,S2
*surface,type=node, NAME=NBOHU22
BO1_HR,
*CONTACT PAIR, INTERACTION=ROUGH22, SMALL SLIDING, ADJUST=.1
NBOHU22, GASKET22
*SURFACE INTERACTION,NAME=ROUGH22
*FRICTION,ROUGH
*SURFACE BEHAVIOR, NO SEPARATION
***************************************
**  Contact Between Gasket and Hub  *** (22.5-45)
***************************************
*** (22.5 - 45)
*ELSET,ELSET=PID37,GENERATE
32217,32240
*ELSET,ELSET=PID38,GENERATE
32241,32264
*surface,NAME=GASKET45
PID37,S6
PID38,S2
*surface,type=node, NAME=NBOHU45
BO3_HR,
*CONTACT PAIR, INTERACTION=ROUGH45, SMALL SLIDING, ADJUST=.1
NBOHU45, GASKET45
*SURFACE INTERACTION,NAME=ROUGH45
*FRICTION,ROUGH
*SURFACE BEHAVIOR, NO SEPARATION
*********************************
**  Contact Between Bolt and Hub (0-22.5)
*********************************
*ELSET,ELSET=PID11,GENERATE
12096,12107
12060,12071
12024,12035
*surface,NAME=BOLT1
PID11,S2
*surface,type=node, NAME=NHUBBLT1
HU1_BR,
*CONTACT PAIR, INTERACTION=BLT_HUB1, SMALL SLIDING, HCRIT=1.1
NHUBBLT1,BOLT1
*SURFACE INTERACTION,NAME=BLT_HUB1
*FRICTION,ROUGH
*SURFACE BEHAVIOR, NO SEPARATION
*********************************
**  Contact Between Bolt and Hub (22.5 - 45)
*********************************
*ELSET,ELSET=PID41,GENERATE
42096,42107
42060,42071
42024,42035
*surface,NAME=BOLT3
PID41,S2
*surface,type=node, NAME=NHUBBLT3
HU3_BR,
*CONTACT PAIR, INTERACTION=BLT_HUB3, SMALL SLIDING, HCRIT=1.1
NHUBBLT3,BOLT3
*SURFACE INTERACTION,NAME=BLT_HUB3
*FRICTION,ROUGH
*SURFACE BEHAVIOR, NO SEPARATION
*************************************
*** Section for pretension loading (0-22.5)
*************************************
*ELSET, ELSET=PSET1
10135,   10136,   10137,   10138,   10139,   10140
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*surface,NAME=PSECT1
PSET1,S2
*PRE-TENSION SECTION,SURFACE=PSECT1,NODE=29999
*************************************
*** Section for pretension loading (22.5 - 45)
*************************************
*ELSET, ELSET=PSET3
40135,   40136,   40137,   40138,   40139,   40140
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*surface,NAME=PSECT3
PSET3,S2
*PRE-TENSION SECTION,SURFACE=PSECT3,NODE=59999
*************************************
*** node set for output
*************************************
*NSET,NSET=NOUT
25896,26228,25923,26184,26132
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** interface nodes on z=0 plane
*NSET,NSET=INTFRONT
17608,   25854,   25849,   17582,   17607,   25852
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**
*RESTART,WRITE,FREQUENCY=100
*PREPRINT,ECHO=NO
**
*STEP,Convert Sdi=No
APPLY PRE-TENSION LOAD
**
*STATIC
1.0,1.0
*CLOAD
29999,1,7500.
59999,1,7500.
**
*NODE PRINT,FREQUENCY=1,NSET=NOUT
U,RF
*NODE PRINT,FREQUENCY=1,NSET=INTFRONT
U,RF
*NODE FILE,FREQUENCY=1,NSET=NOUT
U,RF
**
*CONTACT PRINT, MAIN=GASKET22
*CONTACT PRINT, MAIN=BOLT1
*CONTACT FILE , MAIN=GASKET45
*CONTACT FILE , MAIN=BOLT3
*PRINT, CONTACT=YES
**
**SUBSTRUCTURE PATH,ENTER ELEMENT=2001
**NODE FILE
**U
**SUBSTRUCTURE PATH,LEAVE
**
*END STEP
