** written by FreeCAD inp file writer for CalculiX,Abaqus meshes
** highest dimension mesh elements only.

** Nodes
*Node, NSET=Nall
1, 0, 0, 1000
2, 0, 0, 0
3, 0, 1000, 1000
4, 0, 1000, 0
5, 8000, 0, 1000
6, 8000, 0, 0
7, 8000, 1000, 1000
8, 8000, 1000, 0
9, 0, 0, 500
10, 0, 0, 250
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

** Volume elements
*Element, TYPE=C3D10, ELSET=Evolumes
277, 168, 301, 368, 167, 437, 435, 436, 214, 438, 439
278, 239, 372, 171, 374, 442, 440, 441, 443, 394, 444
279, 172, 307, 306, 239, 446, 327, 445, 448, 447, 449
280, 306, 239, 238, 372, 449, 260, 450, 451, 442, 452
281, 306, 171, 172, 239, 453, 193, 445, 449, 441, 448
282, 239, 171, 172, 374, 441, 193, 448, 443, 444, 454
283, 171, 239, 306, 372, 441, 449, 453, 440, 442, 451
284, 172, 304, 307, 239, 455, 330, 446, 448, 456, 447
285, 168, 368, 301, 234, 436, 435, 437, 458, 457, 459
286, 170, 371, 239, 374, 462, 460, 461, 463, 397, 443
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
** Define element set Eall
*ELSET, ELSET=Eall
Evolumes


***********************************************************
** Element sets for materials and FEM element type (solid, shell, beam, fluid)
*ELSET,ELSET=MaterialSolidSolid
Evolumes

***********************************************************
** constraints fixed node sets
** ConstraintFixed
*NSET,NSET=ConstraintFixed
1,
2,
3,
4,
9,
10,
11,
12,
13,
14,
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
** Physical constants for SI(mm) unit system with Kelvins
*PHYSICAL CONSTANTS, ABSOLUTE ZERO=0, STEFAN BOLTZMANN=5.670374419e-11

***********************************************************
** Materials
** see information about units at file end
** FreeCAD material name: CalculiX-Steel
** MaterialSolid
*MATERIAL, NAME=MaterialSolid
*ELASTIC
210000,0.3

***********************************************************
** Sections
*SOLID SECTION, ELSET=MaterialSolidSolid, MATERIAL=MaterialSolid

***********************************************************
** At least one step is needed to run an CalculiX analysis of FreeCAD
*STEP, INC=2000
*STATIC


***********************************************************
** Fixed Constraints
** ConstraintFixed
*BOUNDARY
ConstraintFixed,1
ConstraintFixed,2
ConstraintFixed,3


***********************************************************
** constraints force node loads
*CLOAD
** ConstraintForce
** node loads on shape: Box:Face2
5,3,-0
6,3,-0
7,3,-0
8,3,-0
21,3,-0
22,3,-187500
23,3,-187500
24,3,-0
25,3,-187500
26,3,-187500
27,3,-0
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

***********************************************************
** Outputs --> frd file
*NODE FILE
U
*EL FILE
S, E
** outputs --> dat file
** reaction forces for Constraint fixed
*NODE PRINT, NSET=ConstraintFixed, TOTALS=ONLY
RF

*OUTPUT, FREQUENCY=1
***********************************************************
*END STEP

***********************************************************
** CalculiX Input file
**   written by    --> FreeCAD 1.0.2
**   written on    --> Mon Mar 23 20:26:47 2026
**   file name     --> FEMExample.FCStd
**   analysis name --> Analysis
**
**
***********************************************************
**  About units:
**  See ccx manual, ccx does not know about any unit.
**  Golden rule: The user must make sure that the numbers they provide have consistent units.
**  The user is the FreeCAD calculix writer module ;-)
**
**  The unit system which is used at Guido Dhondt's company: mm, N, s, K
**  Since Length and Mass are connected by Force, if Length is mm the Mass is in t to get N
**  The following units are used to write to inp file:
**
**  Length: mm (this includes the mesh geometry)
**  Mass: t
**  TimeSpan: s
**  Temperature: K
**
**  This leads to:
**  Force: N
**  Pressure: N/mm^2 == MPa (Young's Modulus has unit Pressure)
**  Density: t/mm^3
**  Gravity: mm/s^2
**  Thermal conductivity: t*mm/K/s^3 == as W/m/K == kW/mm/K
**  Specific Heat: mm^2/s^2/K = J/kg/K == kJ/t/K
**
