*Heading
** Job name: Job-1 Model name: beam
** Generated by: Abaqus/CAE Learning Edition 2025
*Preprint, echo=NO, model=NO, history=NO, contact=NO
**
** PARTS
**
*Part, name=PART-1
*Node
      1,           0.,           0.,           0.
      2,           0.,           0.,  -9.52053547
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*Element, type=T3D2
 9,  1,  9
10,  9, 10
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*Element, type=CPS3
 77,   9,  91,   1
 78,   1,  91,  23
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*Element, type=C3D4
 497, 141, 160, 216, 232
 498, 166,  66, 216, 217
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*End Part
**
**
** ASSEMBLY
**
*Assembly, name=Assembly
**
*Instance, name=PART-1-1, part=PART-1
*End Instance
**
*Elset, elset=LINE1, instance=PART-1-1, generate
  9,  12,   1
*Elset, elset=LINE2, instance=PART-1-1, generate
 13,  21,   1
*Elset, elset=LINE3, instance=PART-1-1, generate
 22,  25,   1
*Elset, elset=LINE4, instance=PART-1-1, generate
 26,  34,   1
*Elset, elset=LINE5, instance=PART-1-1, generate
 35,  38,   1
*Elset, elset=LINE6, instance=PART-1-1, generate
 39,  42,   1
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*Nset, nset=Set-20, instance=PART-1-1
   1,   2,   5,   7,   9,  10
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*Elset, elset=VOLUME1, instance=PART-1-1, generate
  497,  1184,     1
*End Assembly
** ----------------------------------------------------------------
**
** STEP: Step-1
**
*Step, name=Step-1, nlgeom=NO
*Static
1., 1., 1e-05, 1.
**
** BOUNDARY CONDITIONS
**
** Name: BC-1 Type: Displacement/Rotation
*Boundary
Set-20, 1, 1
Set-20, 2, 2
Set-20, 3, 3
**
** LOADS
**
** Name: gravity   Type: Gravity
*Dload
, GRAV, 9.71, 0., 0., -1.
**
** OUTPUT REQUESTS
**
*Restart, write, frequency=0
**
** FIELD OUTPUT: F-Output-1
**
*Output, field, variable=PRESELECT
**
** HISTORY OUTPUT: H-Output-1
**
*Output, history, variable=PRESELECT
*End Step
